*Heading
 3D Linear elasticity with generated mesh
** Job name: 3D_LinElast_eSize_40_160x120x120mm Model name: 3D_LinearElasticity
** Generated by: Abaqus/CAE 2017
*Preprint, echo=NO, model=NO, history=NO, contact=NO
**
** PARTS
**
*Part, name=rectangular
*End Part
**
**
** ASSEMBLY
**
*Assembly, name=Assembly
**
*Instance, name=rectangularInstance, part=rectangular
*Node
      1,         160.,         120.,         120.
      2,         160.,          80.,         120.
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*Element, type=C3D8R
 1, 17, 18, 22, 21,  1,  2,  6,  5
 2, 18, 19, 23, 22,  2,  3,  7,  6
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*Nset, nset=_G2, internal, generate
  1,  80,   1
*Elset, elset=_G2, internal, generate
  1,  36,   1
** Section: rectangularSection
*Solid Section, elset=_G2, material=Steel
1.,
*End Instance
**
*Nset, nset=_G3, internal, instance=rectangularInstance, generate
 65,  80,   1
*Elset, elset=_G3, internal, instance=rectangularInstance, generate
 28,  36,   1
*Nset, nset=_G4, internal, instance=rectangularInstance, generate
  4,  80,   4
*Elset, elset=_G4, internal, instance=rectangularInstance, generate
  3,  36,   3
*Nset, nset=_G5, internal, instance=rectangularInstance
 13, 14, 15, 16, 29, 30
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*Elset, elset=_G5, internal, instance=rectangularInstance
  7,  8,  9, 16, 17, 18, 25, 26, 27, 34, 35, 36
*Nset, nset=_G6, internal, instance=rectangularInstance, generate
  1,  16,   1
*Elset, elset=_G6, internal, instance=rectangularInstance, generate
 1,  9,  1
*End Assembly
**
** MATERIALS
**
*Material, name=Steel
*Elastic
10000., 0.3
**
** BOUNDARY CONDITIONS
**
** Name: Fixedx Type: Symmetry/Antisymmetry/Encastre
*Boundary
_G3, XSYMM
** Name: Fixedy Type: Symmetry/Antisymmetry/Encastre
*Boundary
_G4, YSYMM
** Name: Fixedz Type: Symmetry/Antisymmetry/Encastre
*Boundary
_G5, ZSYMM
** ----------------------------------------------------------------
**
** STEP: Load
**
*Step, name=Load, nlgeom=NO
Load.
*Static
1., 5., 1., 1.
**
** BOUNDARY CONDITIONS
**
** Name: Movex Type: Displacement/Rotation
*Boundary
_G6, 1, 1, 16.
**
** OUTPUT REQUESTS
**
*Restart, write, frequency=0
**
** FIELD OUTPUT: F-Output-1
**
*Output, field, variable=PRESELECT
**
** HISTORY OUTPUT: H-Output-1
**
*Output, history, variable=PRESELECT
*End Step
